// SBML level 3 version 1

function conc(q, vol)
  piecewise(q/vol, vol > 1e-5, 0);
end

function metab_MM(Vmax, Km, PC, q, vol)
  vol*Vmax*conc(q, vol)/(PC*Km + conc(q, vol));
end

function metab_MA(CLH, PC, q, vol)
  CLH*conc(q, vol)/PC;
end

model euromix()

  // Compartments:
  compartment default_compartment = 1;  // SBO:0000290
  compartment Fat = 14.63 L;  // UBERON:0001013
  compartment Rich = 7.35 L;  // UBERON:0000479
  compartment pp = 32.243 L;  // UBERON:0000479
  compartment liver = 1.68 L;  // UBERON:0002107
  compartment gut = 1 L;  // UBERON:0001555
  compartment su = 2.0862 L;  // UBERON:0002097
  compartment se = 0.2318 L;  // UBERON:0002097
  compartment scu = 0.0171 L;  // UBERON:0002097
  compartment sce = 0.0019 L;  // UBERON:0002097
  compartment Art = 1.586667 L;  // UBERON:0013755
  compartment Ven = 3.173333 L;  // UBERON:0013756

  // Species:
  substanceOnly species QFat in Fat = 0;  // substance in mmol; SBO:0000247
  substanceOnly species QRich in Rich = 0;  // substance in mmol; SBO:0000247
  substanceOnly species QPoor in pp = 0;  // substance in mmol; SBO:0000247
  substanceOnly species QLiver in liver = 0;  // substance in mmol; SBO:0000247
  substanceOnly species QMetab in liver = 0;  // substance in mmol; SBO:0000247
  substanceOnly species QGut in gut = 0;  // substance in mmol; SBO:0000247
  substanceOnly species QSkin_u in su = 0;  // substance in mmol; SBO:0000247
  substanceOnly species QSkin_e in se = 0;  // substance in mmol; SBO:0000247
  substanceOnly species QSkin_sc_u in scu = 0;  // substance in mmol; SBO:0000247
  substanceOnly species QSkin_sc_e in sce = 0;  // substance in mmol; SBO:0000247
  substanceOnly species QArt in Art = 0;  // substance in mmol; SBO:0000247
  substanceOnly species QVen in Ven = 0;  // substance in mmol; SBO:0000247
  substanceOnly species QExcret in default_compartment = 0;  // substance in mmol; SBO:0000247
  species QAir in default_compartment = 0;  // substance in mmol; SBO:0000247

  // Parameters:
  BM = 70 kg;  // NCIT:C81328
  BSA = 190;  // NCIT:C25157
  Height_sc = 0.0001 dm;  // OBA:VT0001200
  Height_vs = 0.0122 dm;  // OBA:VT0001200
  scVFat = 0.209 unitless;  // UO:0000191
  scVRich = 0.105 unitless;  // UO:0000192
  scVLiver = 0.024 unitless;  // UO:0000193
  scVBlood = 0.068 unitless;  // UO:0000194
  VFat = 14.63 L;  // PKPBO:00077 PATO:0000918; isPropertyOf UBERON:0001013
  VRich = 7.35 L;  // PKPBO:00093
  VLiver = 1.68 L;  // PKPBO:00069
  VBlood = 4.76 L;  // PATO:0000918
  VArt = 1.586667 L;  // PATO:0000918
  VVen = 3.173333 L;  // PATO:0000918
  VSkin_e = 0.2318 L;  // PATO:0000918
  fSA_exposed = 0.1 unitless;  // UO:0000194
  VSkin_u = 2.0862 L;  // PATO:0000918
  VSkin_sc_e = 0.0019 L;  // PATO:0000918
  VSkin_sc_u = 0.0171 L;  // PATO:0000918
  VPoor = 32.243 L;  // PKPBO:00091
  scFBlood = 4.8;  // OBA:VT0000182
  scFFat = 0.085 unitless;  // UO:0000194
  scFPoor = 0.12 unitless;  // UO:0000194
  scFLiver = 0.27 unitless;  // UO:0000194
  scFSkin = 0.05 unitless;  // UO:0000194
  FBlood = 336;  // NCIT:C94866
  FFat = 28.56;  // NCIT:C94866
  FPoor = 40.32;  // NCIT:C94866
  FLiver = 90.72;  // NCIT:C94866
  FSkin = 16.8;  // NCIT:C94866
  FRich = 159.6;  // NCIT:C94866
  FSkin_e = 1.68;  // NCIT:C94866
  FSkin_u = 15.12;  // NCIT:C94866
  Falv = 2220;  // NCIT:C94967
  PCFat = 2.53 unitless;  // NCIT:C20610
  PCLiver = 0.923 unitless;  // NCIT:C20610
  PCRich = 0.875 unitless;  // NCIT:C20610
  PCPoor = 0.647 unitless;  // NCIT:C20610
  PCSkin_sc = 0.889 unitless;  // NCIT:C20610
  PCSkin = 0.889 unitless;  // NCIT:C20610
  PCAir = 1e99 unitless;  // NCIT:C20610
  Km = 0 mmol;  // SBO:0000027
  Michaelis = 0 unitless;  // STATO:0000034
  Vmax = 0;  // SBO:0000186
  fub = 0.51 unitless;  // PKPBO:00134
  Kp_sc_vs = 0.01;  // SBO:0000491
  kGut = 1;  // PKPBO:00126
  CLH = 132;  // PKPBO:00215
  Ke = 7.5;  // PKPBO:00218
  Frac = 1 unitless;  // PKPBO:00126
  Cinh = 0;  // NCIT:C41185
  Tinh = 0 h;  // PATO:0001309
  OralDose = 0 mmol;  // OBI:0000984
  DermalDose = 0 mmol;  // OBI:0000984
  oral_dose = 0;  // OBI:0000984
  t_oral_dose_1 = 0 h;  // PATO:0000165
  t_oral_dose_2 = 1 h;  // PATO:0000165
  f_su = 1.71;  // PKPBO:00003
  f_se = 0.19;  // PKPBO:00003

  // Reactions:
  _J0: QArt -> QFat; FFat*conc(QArt, Art);
  _J1: QFat -> QVen; FFat*conc(QFat, Fat)/PCFat;
  _J2: QArt -> QRich; FRich*conc(QArt, Art);
  _J3: QRich -> QVen; FRich*conc(QRich, Rich)/PCRich;
  _J4: QArt -> QPoor; FPoor*conc(QArt, Art);
  _J5: QPoor -> QVen; FPoor*conc(QPoor, pp)/PCPoor;
  _J6: QArt -> QLiver; FLiver*conc(QArt, Art);
  _J7: QLiver -> QVen; FLiver*conc(QLiver, liver)/PCLiver;
  _J8: QGut -> QLiver; kGut*QGut;
  _J9: QArt -> QSkin_u; FSkin_u*conc(QArt, Art);
  _J10: QSkin_u -> QVen; FSkin_u*conc(QSkin_u, su)/PCSkin;
  _J11: QSkin_u -> QSkin_sc_u; f_su*conc(QSkin_u, su)/PCSkin_sc;
  _J12: QSkin_sc_u -> QSkin_u; f_su*conc(QSkin_sc_u, scu);
  _J13: QArt -> QSkin_e; FSkin_e*conc(QArt, Art);
  _J14: QSkin_e -> QVen; FSkin_e*conc(QSkin_e, se)/PCSkin;
  _J15: QSkin_e -> QSkin_sc_e; f_se*conc(QSkin_e, se)/PCSkin_sc;
  _J16: QSkin_sc_e -> QSkin_e; f_se*conc(QSkin_sc_e, sce);
  _J17: QVen -> QArt; FBlood*conc(QVen, Ven);
  _J18: QLiver -> QMetab; fub*piecewise(metab_MM(Vmax, Km, PCLiver, QLiver, liver), Michaelis > 0.5, metab_MA(CLH, PCLiver, QLiver, liver));
  _J19: QArt -> QAir; Falv*conc(QArt, Art)/PCAir;
  _J20: QArt -> QExcret; Ke*fub*conc(QArt, Art);

  // Events:
  _E0: at (time >= t_oral_dose_2): QGut = QGut + oral_dose*Frac;

  // Unit definitions:
  unit L = litre;
  unit mmol = 1e-3 mole;
  unit kg = 1000 gram;
  unit dm_square = (0.1 metre)^2;
  unit dm = 0.1 metre;
  unit dimensionless = dimensionless;
  unit L_per_h_per_kg = litre / (36000 second * 1000 gram);
  unit L_per_h = litre / (36000 second);
  unit mM_per_h_per_L = 1e-3 mole / (36000 second * 1000 litre);
  unit dm_per_hour = 0.1 metre / (36000 second);
  unit per_hour = 1 / (36000 second);
  unit mmol_per_L = 1e-3 mole / litre;
  unit hours = 36000 second;
  unit mmol_per_hour = 1e-3 mole / (36000 second);
end
